// COMSOL Multiphysics 6.0.0.318 model "空芯光纤.mph"
// Outline of the model tree

Parameters
  D = 40[um]
  d = 24[um]
  t = 0.5[um]
  lda0 = 1.55[um]
  temp = lda0/2/1.4
  theta = 360/8
  temp2 = D/2+d+lda0*10
  temp3 = lda0*5

Coordinate systems
  pml1: PML "完美匹配层 1" on domains 10
    ScalingType = Cylindrical
    wavelengthSourceType = userDefined
    typicalWavelength = lda0

Geometry
  geom1 "几何 1" (2D, length unit µm)
    c1: Circle "圆 1" | pos = {D/2+d/2, 0}; r = d/2
    c4: Circle "圆 4" | pos = {D/2+d/2, 0}; r = d/2-t
    rot1: Rotate "旋转 1" | input = c1, c4; keep = on; rot = theta
    rot2: Rotate "旋转 2" | input = c1, c4; keep = on; rot = theta*2
    rot3: Rotate "旋转 3" | input = c1, c4; keep = on; rot = theta*3
    rot4: Rotate "旋转 4" | input = c1, c4; keep = on; rot = theta*4
    rot5: Rotate "旋转 5" | input = c1, c4; keep = on; rot = theta*5
    rot6: Rotate "旋转 6" | input = c1, c4; keep = on; rot = theta*6
    rot7: Rotate "旋转 7" | input = c1, c4; keep = on; rot = theta*7
    c2: Circle "圆 2" | r = D/2+d+lda0*15
    c3: Circle "圆 3" | r = D/2+d-lda0/10
    dif1: Difference "差集 1" | input = c2; input2 = c3; keepsubtract = on
    uni1: Union "并集 1"
      input = c1, dif1, rot1(1), rot2(1), rot3(1), rot4(1), rot5(1), rot6(1), rot7(1)
      intbnd = off
      edge = all
    c5: Circle "圆 5" | r = D/2+d+lda0*10
    cha1: Chamfer "倒斜角 1" | point = uni1(1) points 2-5, 10, 11, 19, 20, 25, 26, 34, 35, 40-43; dist = t*3
    fin: Finalize "形成联合体"

Materials
  mat1: Common "空气" on domains 1, 12-19
    RefractiveIndex "折射率"
      n = 1
      ki = 0
  mat2: Common "石英玻璃" on domains 2-11
    RefractiveIndex "折射率"
      n = 1.4378
      ki = 0

Physics
  ewfd: ElectromagneticWavesFrequencyDomain "电磁波，频域" on all domains
    dependent variable E2 = {E2x, E2y, E2z}
    ShapeProperty.order_electricfield = 1
    ShapeProperty.valueType = real
    wee1: WaveEquationElectric "波动方程，电 1" (default)
    pec1: PerfectElectricConductor "理想电导体 1" (default)
    init1: init "初始值 1" (default)
    pec2: PerfectElectricConductor "理想电导体 2" on boundaries 17, 18, 63, 74

Mesh
  mesh1 "网格 1"
    size: MeshSizeDefault "大小" | hmax = 2.8450; hmin = 0.0060000; hcurve = 0.25; hgrad = 1.2; hauto = 2; custom = on
    size1: Size "大小 1" on entire geometry | hmax = lda0; custom = on
    ftri1: FreeTri "自由三角形网格 1" on remaining entities | smoothmaxiter = 4; smoothmaxdepth = 4

Studies
  std1 "研究 1"
    mode: ModeAnalysis "模式分析" | modeFreq = c_const/lda0; neigs = 40; shift = 1; eigwhich = sr; conrad = 1