// COMSOL Multiphysics 6.0.0.318 model "OpticalFiber_model_CnFEM.mph"
// Outline of the model tree

Parameters
  a = 15[um]
  lam0 = 1.55[um]
  ff0 = c_const/lam0
  epsilon2 = 1.45*1.45
  epsilon1 = 1.4*1.4
  meshSize = 4
  b = 4[um]

Geometry
  geom1 "几何 1" (2D, length unit µm)
    c2: Circle "圆 2" | r = a
    uni1: Union "并集 1" | input = c2
    pol1: Polygon "多边形 1"
      source = table
      table = {{b, 0}, {b/2, b/2*sqrt(3)}, {-b/2, b/2*sqrt(3)}, {-b, 0}, {-b/2, -b/2*sqrt(3)}, {b/2, -b/2*sqrt(3)}}
    sq2: Square "正方形 2" | pos = {0, -a-a/2}; base = center; size = a*3
    c3: Circle "圆 3" | rot = 60; r = a*2; angle = 180
    dif1: Difference "差集 1" | input = pol1, uni1; input2 = c3, sq2
    fin: Finalize "形成联合体"

Materials
  mat1: Common "材料 1" on domains 2
    def "基本"
      electricconductivity = 0
      relpermeability = 1
      relpermittivity = epsilon1
  mat2: Common "材料 2" on domains 1
    def "基本"
      electricconductivity = 0
      relpermeability = {1, -0.51i, 0, 0.51i, 1, 0, 0, 0, 1}
      relpermittivity = epsilon2

Physics
  ewfd: ElectromagneticWavesFrequencyDomain "电磁波，频域" on all domains
    dependent variable E = {Ex, Ey, Ez}
    ShapeProperty.order_electricfield = 1
    ShapeProperty.valueType = real
    MeshControl.SizeControlParameter = Wavelength
    MeshControl.PhysicsControlledMeshMinimumWavelength = lam0
    components.components = threecomponent
    wee1: WaveEquationElectric "波动方程，电 1" (default) | DisplacementFieldModel = RelativePermittivity
    pec1: PerfectElectricConductor "完美电导体 1" (default)
    init1: init "初始值 1" (default)

Mesh
  mesh1 "网格 1"
    size: MeshSizeDefault "大小" | hmax = 8; custom = on
    size1: Size "大小 1" on domains 1 | hmax = lam0/1.45/meshSize/2; custom = on
    size2: Size "大小 2" on domains 2 | hmax = lam0/meshSize; custom = on
    ftri1: FreeTri "自由三角形网格 1" on remaining entities

Studies
  std1 "研究 1"
    mode: ModeAnalysis "模式分析" | transform = effective_mode_index; modeFreq = ff0; neigs = 40; shift = 2; eigwhich = sr