// COMSOL Multiphysics 6.0.0.318 model "WaveguideWithPT.mph"
// Outline of the model tree

Parameters
  lda0 = 1[m]
  h0 = 0.2*lda0
  w0 = 0.3*lda0
  d0 = 0.03*lda0
  epr0 = 10
  depr = 0
  meshSize = 100
  temp = epr0+1i*depr

Geometry
  geom1 "几何 1" (2D, length unit m)
    r1: Rectangle "矩形 1" | base = center; size = {3*w0, 3*h0}
    r2: Rectangle "矩形 2" | pos = {-w0/2-d0/2, 0}; base = center; size = {w0, h0}
    r3: Rectangle "矩形 3" | pos = {w0/2+d0/2, 0}; base = center; size = {w0, h0}
    fin: Finalize "形成联合体"

Materials
  mat1: Common "材料 1" on domains 1
    def "基本"
      electricconductivity = 0
      relpermeability = 1
      relpermittivity = 1
  mat2: Common "材料 2" on domains 2
    def "基本"
      electricconductivity = 0
      relpermeability = 1
      relpermittivity = epr0+1i*depr
  mat3: Common "材料 3" on domains 3
    def "基本"
      electricconductivity = 0
      relpermeability = 1
      relpermittivity = epr0-1i*depr

Physics
  ewfd: ElectromagneticWavesFrequencyDomain "电磁波，频域" on all domains
    dependent variable E = {Ex, Ey, Ez}
    ShapeProperty.order_electricfield = 1
    components.components = threecomponent
    wee1: WaveEquationElectric "波动方程，电 1" (default) | DisplacementFieldModel = RelativePermittivity
    pec1: PerfectElectricConductor "理想电导体 1" (default)
    init1: init "初始值 1" (default)
    pmc1: PerfectMagneticConductor "理想磁导体 1" on boundaries 1-3, 12

Mesh
  mesh1 "网格 1"
    size: MeshSizeDefault "大小" | hmax = 0.18000; hmin = 2.7000E-4; hcurve = 0.3; hgrad = 1.3; custom = on
    size1: Size "大小 1" on entire geometry | hmax = lda0/meshSize
    ftri1: FreeTri "自由三角形网格 1" on remaining entities | smoothmaxiter = 4; smoothmaxdepth = 4

Studies
  std1 "研究 1"
    param: Parametric "参数化扫描" | pname = depr; plistarr = range(0,0.005,0.5)
    mode: ModeAnalysis "模式分析" | modeFreq = c_const/lda0; neigs = 2; shift = 2.2; conrad = 1